"""
gantryPython
is based on the scene
/home/lex/catkin_ws/src/superchicko/sofa/python/../scenes/scene_comps/gantry/gantry.scn
but it uses the SofaPython plugin.
Further informations on the usage of the plugin can be found in
sofa/applications/plugins/SofaPython/doc/SofaPython.pdf
To launch the scene, type
runSofa /home/lex/catkin_ws/src/superchicko/sofa/python/../scenes/scene_comps/gantry/gantryPython.py --argv 123
The sofa python plugin might have to be added in the sofa plugin manager,
i.e. add the sofa python plugin in runSofa->Edit->PluginManager.
The arguments given after --argv can be used by accessing self.commandLineArguments, e.g. combined with ast.literal_eval to convert a string to a number.

The current file has been written by the python script
/home/lex/catkin_ws/src/superchicko/sofa/python/xml_2_scn.py
Author of xml_2_scn.py: Christoph PAULUS, christoph.paulus@inria.fr
"""

import sys
import Sofa

class gantry (Sofa.PythonScriptController):

    def __init__(self, node, commandLineArguments) :
        self.commandLineArguments = commandLineArguments
        print "Command line arguments for python : "+str(commandLineArguments)
        self.createGraph(node)
        return None;

    def createGraph(self,rootNode):

        # rootNode
        rootNode.createObject('MeshSTLLoader', scale='1', name='gantry-loader', filename='../../../../ros/srs_traj_opt/couch_description/meshes/truebeam/TBGantry.stl')
        rootNode.createObject('MechanicalObject', src='@gantry-loader', name='gantry-states', template='Vec3d')
        rootNode.createObject('UniformMass', totalMass='250')

        # rootNode/GantryVisu
        GantryVisu = rootNode.createChild('GantryVisu')
        self.GantryVisu = GantryVisu
        GantryVisu.createObject('OglModel', src='@../gantry-loader', dz='0', name='gantryVisual', dy='0', color='', rotation='180 0 0')

        # rootNode/GantryCollis
        GantryCollis = rootNode.createChild('GantryCollis')
        self.GantryCollis = GantryCollis
        GantryCollis.createObject('MeshTopology', name='meshTopology')
        GantryCollis.createObject('MechanicalObject', src='@../gantry-loader', name='gantry-collis-states', template='Vec3d', restScale='1')

        return 0;

    def onMouseButtonLeft(self, mouseX,mouseY,isPressed):
        ## usage e.g.
        #if isPressed :
        #    print "Control+Left mouse button pressed at position "+str(mouseX)+", "+str(mouseY)
        return 0;

    def onKeyReleased(self, c):
        ## usage e.g.
        #if c=="A" :
        #    print "You released a"
        return 0;

    def initGraph(self, node):
        ## Please feel free to add an example for a simple usage in /home/lex/catkin_ws/src/superchicko/sofa/python/xml_2_scn.py
        return 0;

    def onKeyPressed(self, c):
        ## usage e.g.
        #if c=="A" :
        #    print "You pressed control+a"
        return 0;

    def onMouseWheel(self, mouseX,mouseY,wheelDelta):
        ## usage e.g.
        #if isPressed :
        #    print "Control button pressed+mouse wheel turned at position "+str(mouseX)+", "+str(mouseY)+", wheel delta"+str(wheelDelta)
        return 0;

    def storeResetState(self):
        ## Please feel free to add an example for a simple usage in /home/lex/catkin_ws/src/superchicko/sofa/python/xml_2_scn.py
        return 0;

    def cleanup(self):
        ## Please feel free to add an example for a simple usage in /home/lex/catkin_ws/src/superchicko/sofa/python/xml_2_scn.py
        return 0;

    def onGUIEvent(self, strControlID,valueName,strValue):
        ## Please feel free to add an example for a simple usage in /home/lex/catkin_ws/src/superchicko/sofa/python/xml_2_scn.py
        return 0;

    def onEndAnimationStep(self, deltaTime):
        ## Please feel free to add an example for a simple usage in /home/lex/catkin_ws/src/superchicko/sofa/python/xml_2_scn.py
        return 0;

    def onLoaded(self, node):
        ## Please feel free to add an example for a simple usage in /home/lex/catkin_ws/src/superchicko/sofa/python/xml_2_scn.py
        return 0;

    def reset(self):
        ## Please feel free to add an example for a simple usage in /home/lex/catkin_ws/src/superchicko/sofa/python/xml_2_scn.py
        return 0;

    def onMouseButtonMiddle(self, mouseX,mouseY,isPressed):
        ## usage e.g.
        #if isPressed :
        #    print "Control+Middle mouse button pressed at position "+str(mouseX)+", "+str(mouseY)
        return 0;

    def bwdInitGraph(self, node):
        ## Please feel free to add an example for a simple usage in /home/lex/catkin_ws/src/superchicko/sofa/python/xml_2_scn.py
        return 0;

    def onScriptEvent(self, senderNode, eventName,data):
        ## Please feel free to add an example for a simple usage in /home/lex/catkin_ws/src/superchicko/sofa/python/xml_2_scn.py
        return 0;

    def onMouseButtonRight(self, mouseX,mouseY,isPressed):
        ## usage e.g.
        #if isPressed :
        #    print "Control+Right mouse button pressed at position "+str(mouseX)+", "+str(mouseY)
        return 0;

    def onBeginAnimationStep(self, deltaTime):
        ## Please feel free to add an example for a simple usage in /home/lex/catkin_ws/src/superchicko/sofa/python/xml_2_scn.py
        return 0;


def createScene(rootNode):
    try :
        sys.argv[0]
    except :
        commandLineArguments = []
    else :
        commandLineArguments = sys.argv
    mygantry = gantry(rootNode,commandLineArguments)
    return 0;
