<?xml version="1.0"?>
<Node name="PatientRigid">
  <!-- <EulerExplicitSolver name="PatientExplicitSolver" /> -->
  <!-- <EulerImplicitSolver rayleighStiffness="1.5"  rayleighMass="25" /> -->
	<CGLinearSolver template="GraphScattered" iterations="25" tolerance="1e-12"  threshold="1e-18"  />
  <!-- use stl here cause the obj file is cumbersome -->
  <MeshObjLoader name="patient_loader"
    filename="../../../../ros/srs_traj_opt/patient_description/meshes/patient.obj" />
  <MechanicalObject name="patient-states" src="@patient_loader"/>
  <!-- <RigidRigidMapping template="Rigid3d" name="default35" initialPoints="" input="@.." output="@." repartition="1 2 2 2 2"/>
  <JointSpringForceField template="Rigid3d" name="HeadMotionSpringModel"
      spring="BEGIN_SPRING  0 1  FREE_AXIS 0 0 0 0 1 0  KS_T 0 30000  KS_R 0 200000  KD 1  R_LIM_X -0.8 0.8  R_LIM_Y -1.57 1.57  R_LIM_Z 0 0  END_SPRING&#x0A; BEGIN_SPRING  2 3  FREE_AXIS 0 0 0 0 1 0  KS_T 0 30000  KS_R 0 200000  KD 1  R_LIM_X -0.8 0.8  R_LIM_Y -1.57 1.57  R_LIM_Z 0 0  END_SPRING&#x0A; BEGIN_SPRING  4 5  FREE_AXIS 0 0 0 0 1 0  KS_T 0 30000  KS_R 0 200000  KD 1  R_LIM_X -0.8 0.8  R_LIM_Y -1.57 1.57  R_LIM_Z 0 0  END_SPRING&#x0A; BEGIN_SPRING  6 7  FREE_AXIS 0 0 0 0 1 0  KS_T 0 30000  KS_R 0 200000  KD 1  R_LIM_X -0.8 0.8  R_LIM_Y -1.57 1.57  R_LIM_Z 0 0  END_SPRING&#x0A;" /> -->

  <!-- Since body is rigid, diagonal mass allows us to use EulerExplicitSolver -->
  <UniformMass totalMass="95" />
  <UncoupledConstraintCorrection template="Vec3d" name="uncoupledConstraintCorrectionHead" />

  <Node name="PatientVisu" >
    <OglModel name="PatientVisual" src="@../patient_loader" translation="0 0 0" rx="0" ry="0" rz="0" scale="1.0" color="" />
  </Node>

  <Node name="PatientCollis"  >
    <MeshObjLoader name="patient-collis-loader" filename="../../../../ros/srs_traj_opt/patient_description/meshes/patient.obj"/>
    <MeshTopology name="meshTopology"  />
    <MechanicalObject template="Vec3d" name="patient-collis-states" position="0 0 0"  velocity="0 0 0"  force="0 0 0"  externalForce="0 0 0"  restScale="1" />
  </Node>
</Node>
